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# Non inverting Buck-Boost design
# 1) Specifications:
# Input voltage range:
Vimin := 5 V
Vimax := 30 V
# Nominal output voltage:
Vo := 21 V
# Output power
Po := 60 W
# Switching Frequency:
Fsw := 30 kHz
# Inductor current ripple:
ΔI_% := 10 %
# Capacitor voltage ripple:
ΔV_% := 1 %
# 2) Preliminar calculations:
# Duty cycle range:
Dmin := Vo/(Vimax + Vo)
Dmin = 0.411765
Dmax := Vo/(Vimin + Vo)
Dmax = 0.807692
# Output Current:
Io := Po/Vo
Io = 2.85714 A
# Absolute Inductor current ripple:
ΔI := ΔI_%*Io
ΔI = 0.285714 A
# Absolute Capacitor voltage ripple:
ΔV := ΔV_%*Vo
ΔV = 0.21 V
# 3) Dimensionamento do Indutor:
# Buck Mode:
L_buck := Vo*(Vimax - Vo)/(Fsw*Vimax*Io)
L_buck = 7.35e-5 H
# Boost Mode:
L_boost := Vimin^2*(Vo - Vimin)/(Fsw*Io*Vo^2)
L_boost = 1.0582e-5 H
L := max(L_buck, L_boost)
L = 7.35e-5 H
# Maximum switch current:
ΔImax := (Vimax - Vo)*Dmax/(Fsw*L)
ΔImax = 3.2967 A
# Buck Mode:
Iswmax1 := ΔImax/2 + Io
Iswmax1 = 4.50549 A
# Boost Mode:
Iswmax2 := ΔImax/2 + Io/(1 - Dmin)
Iswmax2 = 6.50549 A
